<?xml version="1.0" encoding="UTF-8"?>
<neuroml xmlns="http://www.neuroml.org/schema/neuroml2" xmlns:xsi="http://www.w3.org/2001/XMLSchema-instance" xsi:schemaLocation="http://www.neuroml.org/schema/neuroml2  https://raw.githubusercontent.com/NeuroML/NeuroML2/development/Schemas/NeuroML2/NeuroML_v2beta4.xsd" id="network_ACnet2">

    <pulseGenerator id="BackgroundRandomIClamps" delay="0.0s" duration="100.0s" amplitude="6.0E-10A"/>

    <network id="network_ACnet2" type="networkWithTemperature" temperature="6.3 degC">

    <notes>A small scale network model with 60 cells based on Dave Beeman's Auditory Cortex model</notes>

        <population id="pyramidals_48" component="pyr_4_sym" type="populationList" size="48">
            <instance id="0">
                <location x="64.2564" y="0.68375766" z="94.83054"/>
            </instance>
            <instance id="1">
                <location x="384.13205" y="31.320269" z="105.99679"/>
            </instance>
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        </population>

        <population id="baskets_12" component="bask" type="populationList" size="12">
            <instance id="0">
                <location x="372.5585" y="75.342545" z="459.21057"/>
            </instance>
            <instance id="1">
                <location x="454.36914" y="81.974014" z="18.664598"/>
            </instance>
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        </population>

        <projection id="SmallNet_bask_bask" presynapticPopulation="baskets_12" postsynapticPopulation="baskets_12" synapse="GABA_syn_inh">
            <connection id="0" preCellId="../baskets_12/3/bask" postCellId="../baskets_12/0/bask" preSegmentId="0" preFractionAlong="0.41660583" postSegmentId="0" postFractionAlong="0.68577135"/>
            <connection id="1" preCellId="../baskets_12/3/bask" postCellId="../baskets_12/0/bask" preSegmentId="0" preFractionAlong="0.7876892" postSegmentId="0" postFractionAlong="0.3405236"/>
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        </projection>

        <projection id="SmallNet_bask_pyr" presynapticPopulation="baskets_12" postsynapticPopulation="pyramidals_48" synapse="GABA_syn">
            <connection id="0" preCellId="../baskets_12/10/bask" postCellId="../pyramidals_48/0/pyr_4_sym" preSegmentId="0" preFractionAlong="0.058240294" postSegmentId="6" postFractionAlong="0.026281536"/>
            <connection id="1" preCellId="../baskets_12/9/bask" postCellId="../pyramidals_48/0/pyr_4_sym" preSegmentId="0" preFractionAlong="0.09916419" postSegmentId="6" postFractionAlong="0.95948416"/>
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        </projection>

        <projection id="SmallNet_pyr_pyr" presynapticPopulation="pyramidals_48" postsynapticPopulation="pyramidals_48" synapse="AMPA_syn">
            <connection id="0" preCellId="../pyramidals_48/14/pyr_4_sym" postCellId="../pyramidals_48/0/pyr_4_sym" preSegmentId="0" preFractionAlong="0.5281431" postSegmentId="3" postFractionAlong="0.10796851"/>
            <connection id="1" preCellId="../pyramidals_48/11/pyr_4_sym" postCellId="../pyramidals_48/0/pyr_4_sym" preSegmentId="0" preFractionAlong="0.76487905" postSegmentId="3" postFractionAlong="0.77321243"/>
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        </projection>

        <projection id="SmallNet_pyr_bask" presynapticPopulation="pyramidals_48" postsynapticPopulation="baskets_12" synapse="AMPA_syn_inh">
            <connection id="0" preCellId="../pyramidals_48/1/pyr_4_sym" postCellId="../baskets_12/0/bask" preSegmentId="0" preFractionAlong="0.8973388" postSegmentId="1" postFractionAlong="0.094950974"/>
            <connection id="1" preCellId="../pyramidals_48/45/pyr_4_sym" postCellId="../baskets_12/0/bask" preSegmentId="0" preFractionAlong="0.928107" postSegmentId="1" postFractionAlong="0.5771088"/>
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        </projection>

        <inputList id="BackgroundRandomIClamps" component="BackgroundRandomIClamps" population="pyramidals_48">
            <input id="0" target="../pyramidals_48/37/pyr_4_sym" destination="synapses"/>
            <input id="1" target="../pyramidals_48/35/pyr_4_sym" destination="synapses"/>
            <input id="2" target="../pyramidals_48/28/pyr_4_sym" destination="synapses"/>
            <input id="3" target="../pyramidals_48/5/pyr_4_sym" destination="synapses"/>
            <input id="4" target="../pyramidals_48/20/pyr_4_sym" destination="synapses"/>
            <input id="5" target="../pyramidals_48/19/pyr_4_sym" destination="synapses"/>
            <input id="6" target="../pyramidals_48/0/pyr_4_sym" destination="synapses"/>
            <input id="7" target="../pyramidals_48/38/pyr_4_sym" destination="synapses"/>
            <input id="8" target="../pyramidals_48/1/pyr_4_sym" destination="synapses"/>
            <input id="9" target="../pyramidals_48/7/pyr_4_sym" destination="synapses"/>
            <input id="10" target="../pyramidals_48/3/pyr_4_sym" destination="synapses"/>
            <input id="11" target="../pyramidals_48/11/pyr_4_sym" destination="synapses"/>
            <input id="12" target="../pyramidals_48/21/pyr_4_sym" destination="synapses"/>
            <input id="13" target="../pyramidals_48/15/pyr_4_sym" destination="synapses"/>
        </inputList>

    </network>

</neuroml>
